// SBML level 3 version 2

model EGFR_combined()
  // model units - substance: substance, time: time_unit

  // Compartments:
  compartment cell = 1;
  compartment extra = 5000; extra is "extracellular space";
  compartment intra = 1;

  // Species:
  species Lig in extra = 825/extra;
  species Egfr in cell = 135/cell;
  species iEgfr in intra = 0;
  species Egfr_Lig in cell = 0.97/cell;
  species iEgfr_Lig in intra = 0;
  species pEgfr_Lig in cell = 0.085/cell;
  species ipEgfr_Lig in intra = 0;
  species Shp2 in cell = 27.5/cell;
  species pShp2 in cell = 0.27/cell;
  species aR_Shp2 in cell = 0.23/cell;
  species aR_pShp2 in cell = 0.012/cell;
  species Garem in cell = 1.7/cell;
  species Grb2 in cell = 39/cell;
  species Grb2_Garem in cell = 2/cell;
  species Grb2_pGarem in cell = 0.1/cell;
  species aR_Grb2_Garem in cell = 0.163/cell;
  species aR_Grb2_pGarem in cell = 0.001/cell;
  species Grb2_pGarem_pShp2 in cell = 0.002/cell;
  species Shc1 in cell = 26.7/cell;
  species aR_Shc1 in cell = 0.046/cell;
  species aR_pShc1 in cell = 0.026/cell;
  species pShc1 in cell = 0.31/cell;
  species Gab1 in cell = 2.1/cell;
  species Grb2_Gab1 in cell = 2.7/cell;
  species Grb2_pGab1 in cell = 0.08/cell;
  species aR_Grb2_Gab1 in cell = 0.08/cell;
  species aR_Grb2_pGab1 in cell = 0;
  species Grb2_pGab1_pShp2 in cell = 0.002/cell;
  species SOS1 in cell = 0.13/cell;
  species Grb2_SOS1 in cell = 3.1/cell;
  species Ad1_Grb2_SOS1 in cell = 0.007/cell;
  species iAd1_Grb2_SOS1 in cell = 0.002/cell;
  species iGrb2_pGarem_pShp2 in cell = 0.002/cell;
  species Ad2_Grb2_SOS1 in cell = 0.008/cell;
  species iAd2_Grb2_SOS1 in cell = 0.002/cell;
  species iGrb2_pGab1_pShp2 in cell = 0.002/cell;
  species Ad3_Grb2_SOS1 in cell = 0.31/cell;
  species iAd3_Grb2_SOS1 in cell = 0.08/cell;
  species ipShc1 in cell = 0.08/cell;
  species Ras in cell = 98/cell;
  species aRas1 in cell = 0.08/cell;
  species aRas2 in cell = 0.08/cell;
  species aRas3 in cell = 0.67/cell;
  species Rasa1 in cell = 98/cell;
  species pEGFRtot in cell;
  species aRtot in cell;
  species pGAREMtot in cell;
  species pGAB1tot in cell;
  species pSHC1tot in cell;
  species aRAStot in cell;
  species pShp2tot in cell;
  species total_SOS in cell;

  // Parameters:
  Vr = 0.176;
  kt = 0.0013;
  kx = 1;
  kf = 0.0159;
  kr = 0.00685;
  ke = 0.0037;
  kh = 0.00056;
  kp1 = 0.03120503;
  k_p1 = 0.2281893;
  k7 = 0.01767962;
  k_7 = 3.442925;
  kp5 = 0.3954125;
  k_7a = 10.04059;
  k_p5 = 0.06997885;
  k1 = 0.000201668;
  k_1 = 0.01575331;
  k2 = 0.2771792;
  k_2 = 0.198845;
  kp2 = 0.003898694;
  k_2a = 16.20913;
  k_p2 = 0.002058256;
  k3 = 0.03367826;
  k_3 = 0.0945273;
  k4 = 0.000101723;
  k_4 = 0.0137096;
  k5 = 1.470702;
  k_5 = 0.4782209;
  kp3 = 0.00279866;
  k_5a = 10.39393;
  k_p3 = 0.0008222196;
  k3a = 0.1693836;
  k_3a = 0.03297107;
  k6 = 0.05924086;
  k_6 = 2.832971;
  kp4 = 0.104144;
  k_6a = 0.1071875;
  k_p4 = 0.241914;
  k8 = 8.005134e-5;
  k_8 = 0.0003801806;
  k11 = 0.12723;
  k_11 = 0.01034532;
  ke1 = 0.02195789;
  kr1a = 0.003479319;
  kr2a = 0.02329512;
  k12 = 0.02861106;
  k_12 = 0.01403593;
  ke2 = 0.00290841;
  kr1b = 0.00304414;
  kr2b = 0.01746353;
  k13 = 0.08170191;
  k_13 = 0.1802974;
  ke3 = 0.003308485;
  kr1c = 0.08023304;
  kr2c = 0.001700606;
  k14 = 0.1136079;
  k14a = 0.2763866;
  k14b = 0.0429;
  k15 = 0.0216102;
  k15a = 0.005914268;
  k15b = 0.002400861;

  // Assignment rules:
  pEGFRtot := pEgfr_Lig + ipEgfr_Lig + aR_Grb2_Garem + aR_Grb2_pGarem + aR_Grb2_Gab1 + aR_Grb2_pGab1 + aR_Shp2 + aR_pShp2 + aR_Shc1 + aR_pShc1;
  aRtot := pEgfr_Lig + ipEgfr_Lig;
  pGAREMtot := aR_Grb2_pGarem + Grb2_pGarem + Grb2_pGarem_pShp2 + Ad1_Grb2_SOS1 + iAd1_Grb2_SOS1 + iGrb2_pGarem_pShp2;
  pGAB1tot := aR_Grb2_pGab1 + Grb2_pGab1 + Grb2_pGab1_pShp2 + Ad2_Grb2_SOS1 + iAd2_Grb2_SOS1 + iGrb2_pGab1_pShp2;
  pSHC1tot := aR_pShc1 + pShc1 + Ad3_Grb2_SOS1 + iAd3_Grb2_SOS1 + ipShc1;
  aRAStot := aRas1 + aRas2 + aRas3;
  pShp2tot := aR_pShp2 + pShp2 + Grb2_pGarem_pShp2 + Ad1_Grb2_SOS1 + iAd1_Grb2_SOS1 + Grb2_pGab1_pShp2 + Ad2_Grb2_SOS1 + iAd2_Grb2_SOS1 + iGrb2_pGarem_pShp2 + iGrb2_pGab1_pShp2;
  total_SOS := SOS1 + Grb2_SOS1 + Ad1_Grb2_SOS1 + iAd1_Grb2_SOS1 + Ad2_Grb2_SOS1 + iAd2_Grb2_SOS1 + Ad3_Grb2_SOS1 + iAd3_Grb2_SOS1;

  // Reactions:
  J1: => Egfr; Vr;
  J2: Egfr => iEgfr; kt*Egfr;
  J3: iEgfr => ; kx*iEgfr;
  J4: Egfr -> Egfr_Lig; kf*Egfr*Lig - kr*Egfr_Lig;  // modifiers: Lig
  J5: Egfr_Lig => iEgfr_Lig; ke*Egfr_Lig;
  J6: iEgfr_Lig => ; kh*iEgfr_Lig;
  J7: Egfr_Lig -> pEgfr_Lig; kp1*Egfr_Lig - k_p1*pEgfr_Lig;
  J8: pEgfr_Lig => ipEgfr_Lig; ke*pEgfr_Lig;
  J9: ipEgfr_Lig => ; kh*ipEgfr_Lig;
  J10: pEgfr_Lig + Shp2 -> aR_Shp2; k7*pEgfr_Lig*Shp2 - k_7*aR_Shp2;
  J11: aR_Shp2 => aR_pShp2; kp5*aR_Shp2;
  J12: aR_pShp2 => pEgfr_Lig + pShp2; k_7a*aR_pShp2;
  J13: pShp2 => Shp2; k_p5*pShp2;
  J14: Garem + Grb2 -> Grb2_Garem; k1*Garem*Grb2 - k_1*Grb2_Garem;
  J15: pEgfr_Lig + Grb2_Garem -> aR_Grb2_Garem; k2*pEgfr_Lig*Grb2_Garem - k_2*aR_Grb2_Garem;
  J16: aR_Grb2_Garem => aR_Grb2_pGarem; kp2*aR_Grb2_Garem;
  J17: aR_Grb2_pGarem => pEgfr_Lig + Grb2_pGarem; k_2a*aR_Grb2_pGarem;
  J18: Grb2_pGarem => Grb2_Garem; k_p2*Grb2_pGarem;
  J19: Grb2_pGarem + pShp2 -> Grb2_pGarem_pShp2; k3*Grb2_pGarem*pShp2 - k_3*Grb2_pGarem_pShp2;
  J20: Gab1 + Grb2 -> Grb2_Gab1; k4*Gab1*Grb2 - k_4*Grb2_Gab1;
  J21: pEgfr_Lig + Grb2_Gab1 -> aR_Grb2_Gab1; k5*pEgfr_Lig*Grb2_Gab1 - k_5*aR_Grb2_Gab1;
  J22: aR_Grb2_Gab1 => aR_Grb2_pGab1; kp3*aR_Grb2_Gab1;
  J23: aR_Grb2_pGab1 => pEgfr_Lig + Grb2_pGab1; k_5a*aR_Grb2_pGab1;
  J24: Grb2_pGab1 => Grb2_Gab1; k_p3*Grb2_pGab1;
  J25: Grb2_pGab1 + pShp2 -> Grb2_pGab1_pShp2; k3a*Grb2_pGab1*pShp2 - k_3a*Grb2_pGab1_pShp2;
  J26: pEgfr_Lig + Shc1 -> aR_Shc1; k6*pEgfr_Lig*Shc1 - k_6*aR_Shc1;
  J27: aR_Shc1 => aR_pShc1; kp4*aR_Shc1;
  J28: aR_pShc1 => pEgfr_Lig + pShc1; k_6a*aR_pShc1;
  J29: pShc1 => Shc1; k_p4*pShc1;
  J30: Grb2 + SOS1 -> Grb2_SOS1; k8*Grb2*SOS1 - k_8*Grb2_SOS1;
  J31: Grb2_pGarem_pShp2 + Grb2_SOS1 -> Ad1_Grb2_SOS1; k11*Grb2_pGarem_pShp2*Grb2_SOS1 - k_11*Ad1_Grb2_SOS1;
  J32: Ad1_Grb2_SOS1 => iAd1_Grb2_SOS1; ke1*Ad1_Grb2_SOS1;
  J33: iAd1_Grb2_SOS1 => Grb2_SOS1 + iGrb2_pGarem_pShp2; kr1a*iAd1_Grb2_SOS1;
  J34: iGrb2_pGarem_pShp2 => Grb2_pGarem + pShp2; kr2a*iGrb2_pGarem_pShp2;
  J35: Grb2_pGab1_pShp2 + Grb2_SOS1 -> Ad2_Grb2_SOS1; k12*Grb2_pGab1_pShp2*Grb2_SOS1 - k_12*Ad2_Grb2_SOS1;
  J36: Ad2_Grb2_SOS1 => iAd2_Grb2_SOS1; ke2*Ad2_Grb2_SOS1;
  J37: iAd2_Grb2_SOS1 => Grb2_SOS1 + iGrb2_pGab1_pShp2; kr1b*iAd2_Grb2_SOS1;
  J38: iGrb2_pGab1_pShp2 => Grb2_pGab1 + pShp2; kr2b*iGrb2_pGab1_pShp2;
  J39: pShc1 + Grb2_SOS1 -> Ad3_Grb2_SOS1; k13*pShc1*Grb2_SOS1 - k_13*Ad3_Grb2_SOS1;
  J40: Ad3_Grb2_SOS1 => iAd3_Grb2_SOS1; ke3*Ad3_Grb2_SOS1;
  J41: iAd3_Grb2_SOS1 => Grb2_SOS1 + ipShc1; kr1c*iAd3_Grb2_SOS1;
  J42: ipShc1 => pShc1; kr2c*ipShc1;
  J44: Ad1_Grb2_SOS1 + Ras => Ad1_Grb2_SOS1 + aRas1; k14*Ad1_Grb2_SOS1*Ras;
  J45: Ad2_Grb2_SOS1 + Ras => Ad2_Grb2_SOS1 + aRas2; k14a*Ad2_Grb2_SOS1*Ras;
  J46: Ad3_Grb2_SOS1 + Ras => Ad3_Grb2_SOS1 + aRas3; k14b*Ad3_Grb2_SOS1*Ras;
  J47: aRas1 + Rasa1 => Ras + Rasa1; k15*aRas1*Rasa1;
  J48: aRas2 + Rasa1 => Ras + Rasa1; k15a*aRas2*Rasa1;
  J49: aRas3 + Rasa1 => Ras + Rasa1; k15b*aRas3*Rasa1;

  // Unit definitions:
  unit nM = 1e-9 mole / litre;
  unit substance = 1e-9 mole; substance is "nmole";
  unit time_unit = second; time_unit is "s";
  unit per_nM = litre / (1e-9 mole);
  unit per_sec = 1 / second; per_sec is "s-1";
  unit nM_per_s = 1e-9 mole / (litre * second); nM_per_s is "nM/s";
  unit per_nMs = litre / (1e-9 mole * second); per_nMs is "nM-1 s-1";
end
